Simulations: Version=204
  DataStore
  Simulation CropRotation_flexible_final
    Clock: Start=1985-01-01; End=1999-12-31
    Summary
    Weather: FileName=%root%/Examples/WeatherFiles/AU_Dalby.met
    SoilArbitrator
    Zone Paddock: Area=1; Slope=0; AspectAngle=0; Altitude=50
      Report DailyReport: EventNames=[Clock].EndOfDay
        VariableNames:
          [Clock].Today
          [SurfaceOrganicMatter].Cover
          [SurfaceOrganicMatter].Wt
          [ISoilWater].Runoff
          Sum([Soil].Nutrient.Organic.C) as SoilOrganicC_fullProfile
          Sum([Soil].Nutrient.Organic.N) as SoilOrganicN_fullProfile
          Sum([Soil].Nutrient.MineralisedN) as MineralisedN_fullProfile
          Sum([Soil].Water.Volumetric) as SoilWatVolumetric_fullProfile
          Sum([Nutrient].MineralisedN) as MineralisedN_fullProfile
          Sum([Nitrification].Value + [Nitrification].Natm) as Nitrification_total
          Sum([Denitrification].Value + [Denitrification].Natm) as Denitrification_total
      Report HarvestReport_sorghum: EventNames=[Sorghum].Harvesting
        VariableNames:
          [Clock].Today
          [Sorghum].Grain.Wt
          [Sorghum].AboveGround.Wt
          [Sorghum].Leaf.LAI
      Report HarvestReport_mungbean: EventNames=[Mungbean].Harvesting
        VariableNames:
          [Clock].Today
          [Mungbean].Grain.Wt
          [Mungbean].AboveGround.Wt
          [Mungbean].Leaf.LAI
      Report HarvestReport_wheat: EventNames=[Wheat].Harvesting
        VariableNames:
          [Clock].Today
          [Wheat].Grain.Wt
          [Wheat].AboveGround.Wt
          [Wheat].Leaf.LAI
      Report HarvestReport_chickpea: EventNames=[Chickpea].Harvesting
        VariableNames:
          [Clock].Today
          [Chickpea].Grain.Wt
          [Chickpea].AboveGround.Wt
          [Chickpea].Leaf.LAI
      Fertiliser
      MicroClimate: a_interception=0; b_interception=1; c_interception=0; d_interception=0; SoilHeatFluxFraction=0.4; MinimumHeightDiffForNewLayer=0; NightInterceptionFraction=0.5; ReferenceHeight=2
      Soil HRS: SoilType=HMM; Site=HRS; NearestTown=Unknown; Region=SE Queensland; NaturalVegetation=Unknown; Latitude=-27.18; Longitude=151.26
        Physical
          Thickness  ParticleSizeSand  ParticleSizeSilt  ParticleSizeClay  Rocks  BD    AirDry  LL15   DUL   SAT
          100        5                 65                30                0      1.34  0.08    0.226  0.42  0.45
          100        5                 65                30                0      1.34  0.19    0.226  0.42  0.45
          200        5                 65                30                0      1.33  0.23    0.258  0.46  0.48
          200        5                 65                30                0      1.38  0.26    0.27   0.46  0.47
          200        5                 65                30                0      1.4   0.26    0.268  0.43  0.45
          200        5                 65                30                0      1.55  0.28    0.304  0.4   0.41
          200        5                 65                30                0      1.59  0.25    0.335  0.37  0.38
          200        5                 65                30                0      1.63  0.28    0.33   0.33  0.37
          200        5                 65                30                0      1.66  0.3     0.32   0.32  0.37
          200        5                 65                30                0      1.68  0.31    0.33   0.33  0.36
          Rocks, ParticleSizeSand, ParticleSizeSilt, ParticleSizeClay source: Calculated
          SoilCrop SorghumSoil
            LL=[0.226, 0.226, 0.258, 0.27, 0.268, 0.304, 0.335, 0.33, 0.32, 0.33]
            KL=[0.07, 0.07, 0.07, 0.07, 0.06, 0.06, 0.06, 0.05, 0.05, 0.04]
            XF=[1, 1, 1, 1, 1, 1, 1, 1, 1, 1]
          SoilCrop WheatSoil
            LL=[0.226, 0.226, 0.258, 0.27, 0.268, 0.304, 0.335, 0.33, 0.32, 0.33]
            KL=[0.06, 0.06, 0.06, 0.06, 0.04, 0.04, 0.04, 0.02, 0.02, 0.01]
            XF=[1, 1, 1, 1, 1, 1, 1, 1, 1, 1]
          SoilCrop MungbeanSoil
            LL=[0.24, 0.24, 0.275, 0.295, 0.29, 0.33, 0.35, 0.33, 0.32, 0.33]
            KL=[0.06, 0.06, 0.06, 0.06, 0.04, 0.04, 0.04, 0, 0, 0]
            XF=[1, 1, 1, 1, 1, 1, 1, 1, 1, 1]
          SoilCrop ChickpeaSoil: same as CropRotation_flexible_final.Paddock.HRS.Physical.MungbeanSoil
        WaterBalance SoilWater: SummerDate=1-Nov; SummerU=1.5; SummerCona=6.5; WinterDate=1-Apr; WinterU=1.5; WinterCona=6.5; DiffusConst=40; DiffusSlope=16; Salb=0.2; CN2Bare=85; CNRed=20; CNCov=0.8; PSIDul=-100; Thickness=[100, 100, 200, 200, 200, 200, 200, 200, 200, 200]; SWCON=[0.3, 0.3, 0.3, 0.3, 0.3, 0.3, 0.3, 0.3, 0.3, 0.3]
        Nutrient
        Organic: FOMCNRatio=50; CarbonUnits=Total
          Thickness  Carbon  SoilCNRatio  FBiom  FInert  FOM
          100        1.19    12.5         0.05   0.45    260.587
          100        0.59    12.5         0.02   0.6     220.582
          200        0.45    12.5         0.01   0.75    158.054
          200        0.3     12.5         0.01   0.9     113.251
          200        0.2     12.5         0.01   0.9     81.1478
          200        0.16    12.5         0.01   0.9     58.1449
          200        0.17    12.5         0.01   0.9     41.6626
          200        0.17    12.5         0.05   0.9     29.8526
          200        0.17    12.5         0.02   0.9     21.3903
          200        0.17    12.5         0.01   0.9     15.3268
        Chemical: PHUnits=Water
          Thickness  PH   CEC
          100        6.3  11.0225
          100        6.4  9.6725
          200        6.5  9.3575
          200        6.6  9.02
          200        6.6  8.795
          200        6.5  8.705
          200        6.5  8.7275
          200        6.5  8.7275
          200        6.5  8.7275
          200        6.5  8.7275
          CEC source: Calculated
        Water: Thickness=[100, 100, 200, 200, 200, 200, 200, 200, 200, 200]; FilledFromTop=false
          InitialValues=[0.323, 0.323, 0.359, 0.365, 0.349, 0.352, 0.3525, 0.33, 0.32, 0.33]
        Solute NO3: Thickness=[100, 100, 200, 200, 200, 200, 200, 200, 200, 200]; InitialValuesUnits=ppm; WaterTableConcentration=0; D0=0; DepthConstant=0; MaxDepthSoluteAccessible=0; RunoffEffectivenessAtMovingSolute=0; MaxEffectiveRunoff=0
          InitialValues=[10.4, 1.633, 1.233, 0.9, 1.1, 1.467, 3.633, 5.667, 5.8, 7.267]
        Solute NH4: Thickness=[100, 100, 200, 200, 200, 200, 200, 200, 200, 200]; InitialValues=[0.1, 0.1, 0.1, 0.1, 0.1, 0.1, 0.1, 0.1, 0.1, 0.1]; InitialValuesUnits=ppm; WaterTableConcentration=0; D0=0; DepthConstant=0; MaxDepthSoluteAccessible=0; RunoffEffectivenessAtMovingSolute=0; MaxEffectiveRunoff=0
        Solute Urea: Thickness=[100, 100, 200, 200, 200, 200, 200, 200, 200, 200]; InitialValues=[0, 0, 0, 0, 0, 0, 0, 0, 0, 0]; InitialValuesUnits=kg/ha; WaterTableConcentration=0; D0=0; DepthConstant=0; MaxDepthSoluteAccessible=0; RunoffEffectivenessAtMovingSolute=0; MaxEffectiveRunoff=0
        SoilTemperature Temperature
      Plant Sorghum
      Plant Mungbean
      Plant Wheat
      Plant Chickpea
      SurfaceOrganicMatter: InitialResidueName=wheat_stubble; InitialResidueType=wheat; InitialResidueMass=0; InitialStandingFraction=0; InitialCPR=0; InitialCNR=80
      Operations
        1985-06-05  [Wheat].Sow("Janz", 25, 40, 500)
        1985-06-05  [Fertiliser].Apply(100, "UreaN", 100)
        1985-11-16  [Wheat].Harvest()
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