Simulations: Version=206
  DataStore
  Simulation CropRotation_flexible_final
    Clock: Start=1985-01-01; End=1999-12-31
    Summary
    Weather: FileName=%root%/Examples/WeatherFiles/AU_Dalby.met
    SoilArbitrator
    Zone Paddock: Area=1; Slope=0; AspectAngle=0; Altitude=50
      Report DailyReport: EventNames=[Clock].EndOfDay
        VariableNames:
          [Clock].Today
          [SurfaceOrganicMatter].Cover
          [SurfaceOrganicMatter].Wt
          [ISoilWater].Runoff
          Sum([Soil].Nutrient.Organic.C) as SoilOrganicC_fullProfile
          Sum([Soil].Nutrient.Organic.N) as SoilOrganicN_fullProfile
          Sum([Soil].Nutrient.MineralisedN) as MineralisedN_fullProfile
          Sum([Soil].Water.Volumetric) as SoilWatVolumetric_fullProfile
          Sum([Nutrient].MineralisedN) as MineralisedN_fullProfile
          Sum([Nitrification].Value + [Nitrification].Natm) as Nitrification_total
          Sum([Denitrification].Value + [Denitrification].Natm) as Denitrification_total
      Report HarvestReport_sorghum: EventNames=[Sorghum].Harvesting
        VariableNames:
          [Clock].Today
          [Sorghum].Grain.Wt
          [Sorghum].AboveGround.Wt
          [Sorghum].Leaf.LAI
      Report HarvestReport_mungbean: EventNames=[Mungbean].Harvesting
        VariableNames:
          [Clock].Today
          [Mungbean].Grain.Wt
          [Mungbean].AboveGround.Wt
          [Mungbean].Leaf.LAI
      Report HarvestReport_wheat: EventNames=[Wheat].Harvesting
        VariableNames:
          [Clock].Today
          [Wheat].Grain.Wt
          [Wheat].AboveGround.Wt
          [Wheat].Leaf.LAI
      Report HarvestReport_chickpea: EventNames=[Chickpea].Harvesting
        VariableNames:
          [Clock].Today
          [Chickpea].Grain.Wt
          [Chickpea].AboveGround.Wt
          [Chickpea].Leaf.LAI
      Fertiliser
      MicroClimate: a_interception=0; b_interception=1; c_interception=0; d_interception=0; SoilHeatFluxFraction=0.4; MinimumHeightDiffForNewLayer=0; NightInterceptionFraction=0.5; ReferenceHeight=2
      Soil HRS: SoilType=HMM; Site=HRS; NearestTown=Unknown; Region=SE Queensland; NaturalVegetation=Unknown; Latitude=-27.18; Longitude=151.26
        Physical
          Thickness  ParticleSizeSand  ParticleSizeSilt  ParticleSizeClay  Rocks  BD    AirDry  LL15   DUL   SAT
          100        5                 65                30                0      1.34  0.08    0.226  0.42  0.45
          100        5                 65                30                0      1.34  0.19    0.226  0.42  0.45
          200        5                 65                30                0      1.33  0.23    0.258  0.46  0.48
          200        5                 65                30                0      1.38  0.26    0.27   0.46  0.47
          200        5                 65                30                0      1.4   0.26    0.268  0.43  0.45
          200        5                 65                30                0      1.55  0.28    0.304  0.4   0.41
          200        5                 65                30                0      1.59  0.25    0.335  0.37  0.38
          200        5                 65                30                0      1.63  0.28    0.33   0.33  0.37
          200        5                 65                30                0      1.66  0.3     0.32   0.32  0.37
          200        5                 65                30                0      1.68  0.31    0.33   0.33  0.36
          Rocks, ParticleSizeSand, ParticleSizeSilt, ParticleSizeClay source: Calculated
          SoilCrop SorghumSoil
            LL=[0.226, 0.226, 0.258, 0.27, 0.268, 0.304, 0.335, 0.33, 0.32, 0.33]
            KL=[0.07, 0.07, 0.07, 0.07, 0.06, 0.06, 0.06, 0.05, 0.05, 0.04]
            XF=[1, 1, 1, 1, 1, 1, 1, 1, 1, 1]
          SoilCrop WheatSoil
            LL=[0.226, 0.226, 0.258, 0.27, 0.268, 0.304, 0.335, 0.33, 0.32, 0.33]
            KL=[0.06, 0.06, 0.06, 0.06, 0.04, 0.04, 0.04, 0.02, 0.02, 0.01]
            XF=[1, 1, 1, 1, 1, 1, 1, 1, 1, 1]
          SoilCrop MungbeanSoil
            LL=[0.24, 0.24, 0.275, 0.295, 0.29, 0.33, 0.35, 0.33, 0.32, 0.33]
            KL=[0.06, 0.06, 0.06, 0.06, 0.04, 0.04, 0.04, 0, 0, 0]
            XF=[1, 1, 1, 1, 1, 1, 1, 1, 1, 1]
          SoilCrop ChickpeaSoil: same as CropRotation_flexible_final.Paddock.HRS.Physical.MungbeanSoil
        WaterBalance SoilWater: SummerDate=1-Nov; SummerU=1.5; SummerCona=6.5; WinterDate=1-Apr; WinterU=1.5; WinterCona=6.5; DiffusConst=40; DiffusSlope=16; Salb=0.2; CN2Bare=85; CNRed=20; CNCov=0.8; PSIDul=-100; Thickness=[100, 100, 200, 200, 200, 200, 200, 200, 200, 200]; SWCON=[0.3, 0.3, 0.3, 0.3, 0.3, 0.3, 0.3, 0.3, 0.3, 0.3]
        Nutrient
        Organic: FOMCNRatio=50; CarbonUnits=Total
          Thickness  Carbon  SoilCNRatio  FBiom  FInert  FOM
          100        1.19    12.5         0.05   0.45    260.587
          100        0.59    12.5         0.02   0.6     220.582
          200        0.45    12.5         0.01   0.75    158.054
          200        0.3     12.5         0.01   0.9     113.251
          200        0.2     12.5         0.01   0.9     81.1478
          200        0.16    12.5         0.01   0.9     58.1449
          200        0.17    12.5         0.01   0.9     41.6626
          200        0.17    12.5         0.05   0.9     29.8526
          200        0.17    12.5         0.02   0.9     21.3903
          200        0.17    12.5         0.01   0.9     15.3268
        Chemical: PHUnits=Water
          Thickness  PH   CEC
          100        6.3  11.0225
          100        6.4  9.6725
          200        6.5  9.3575
          200        6.6  9.02
          200        6.6  8.795
          200        6.5  8.705
          200        6.5  8.7275
          200        6.5  8.7275
          200        6.5  8.7275
          200        6.5  8.7275
          CEC source: Calculated
        Water: Thickness=[100, 100, 200, 200, 200, 200, 200, 200, 200, 200]; FilledFromTop=false
          InitialValues=[0.323, 0.323, 0.359, 0.365, 0.349, 0.352, 0.3525, 0.33, 0.32, 0.33]
        Solute NO3: Thickness=[100, 100, 200, 200, 200, 200, 200, 200, 200, 200]; InitialValuesUnits=ppm; WaterTableConcentration=0; D0=0; DepthConstant=0; MaxDepthSoluteAccessible=0; RunoffEffectivenessAtMovingSolute=0; MaxEffectiveRunoff=0
          InitialValues=[10.4, 1.633, 1.233, 0.9, 1.1, 1.467, 3.633, 5.667, 5.8, 7.267]
        Solute NH4: Thickness=[100, 100, 200, 200, 200, 200, 200, 200, 200, 200]; InitialValues=[0.1, 0.1, 0.1, 0.1, 0.1, 0.1, 0.1, 0.1, 0.1, 0.1]; InitialValuesUnits=ppm; WaterTableConcentration=0; D0=0; DepthConstant=0; MaxDepthSoluteAccessible=0; RunoffEffectivenessAtMovingSolute=0; MaxEffectiveRunoff=0
        Solute Urea: Thickness=[100, 100, 200, 200, 200, 200, 200, 200, 200, 200]; InitialValues=[0, 0, 0, 0, 0, 0, 0, 0, 0, 0]; InitialValuesUnits=kg/ha; WaterTableConcentration=0; D0=0; DepthConstant=0; MaxDepthSoluteAccessible=0; RunoffEffectivenessAtMovingSolute=0; MaxEffectiveRunoff=0
        SoilTemperature Temperature
      Plant Sorghum
      Plant Mungbean
      Plant Wheat
      Plant Chickpea
      SurfaceOrganicMatter: InitialResidueName=wheat_stubble; InitialResidueType=wheat; InitialResidueMass=0; InitialStandingFraction=0; InitialCPR=0; InitialCNR=80
      RotationManager: TopLevel=true; InitialState=Fallow; Verbose=true
        Nodes:
          ID  Name
          1   Sorghum
          3   Mungbean
          4   Fallow
          7   Wheat
          8   Chickpea
        Arcs:
          {SourceID=1, DestinationID=4, Conditions=[[SowHarvest_sorghum].Script.CanHarvest], Actions=[[SowHarvest_sorghum].Script.HarvestCrop()], ID=2, Name=Exit SG}
          {SourceID=4, DestinationID=1, Conditions=[[SowHarvest_sorghum].Script.CanSow], Actions=[[SowHarvest_sorghum].Script.SowCrop()], ID=5, Name=Enter SG}
          {SourceID=8, DestinationID=4, Conditions=[[SowHarvest_chickpea].Script.CanHarvest], Actions=[[SowHarvest_chickpea].Script.HarvestCrop()], ID=6, Name=Exit CP}
          {SourceID=4, DestinationID=8, Conditions=[[SowHarvest_chickpea].Script.CanSow], Actions=[[SowHarvest_chickpea].Script.SowCrop()], ID=9, Name=Enter CP}
          {SourceID=4, DestinationID=7, Conditions=[[SowHarvest_wheat].Script.CanSow], Actions=[[SowHarvest_wheat].Script.SowCrop()], ID=10, Name=Enter WH}
          {SourceID=7, DestinationID=4, Conditions=[[SowHarvest_wheat].Script.CanHarvest], Actions=[[SowHarvest_wheat].Script.HarvestCrop()], ID=11, Name=Exit WH}
          {SourceID=4, DestinationID=3, Conditions=[[SowHarvest_mungbean].Script.CanSow], Actions=[[SowHarvest_mungbean].Script.SowCrop()], ID=12, Name=Enter MB}
          {SourceID=3, DestinationID=4, Conditions=[[SowHarvest_mungbean].Script.CanHarvest], Actions=[[SowHarvest_mungbean].Script.HarvestCrop()], ID=13, Name=Exit MB}
          {SourceID=1, DestinationID=4, Conditions=[[SowHarvest_sorghum].Script.MustAbandon], Actions=[[SowHarvest_sorghum].Script.AbandonCrop()], ID=14, Name=Abandon SG}
          {SourceID=7, DestinationID=4, Conditions=[[SowHarvest_wheat].Script.MustAbandon], Actions=[[SowHarvest_wheat].Script.AbandonCrop()], ID=15, Name=Abandon WH}
          {SourceID=3, DestinationID=4, Conditions=[[SowHarvest_mungbean].Script.MustAbandon], Actions=[[SowHarvest_mungbean].Script.AbandonCrop()], ID=16, Name=Abandon MB}
          {SourceID=8, DestinationID=4, Conditions=[[SowHarvest_chickpea].Script.MustAbandon], Actions=[[SowHarvest_chickpea].Script.AbandonCrop()], ID=17, Name=Abandon CP}
        RotationRugplot: SimulationName=CropRotation_flexible_final
      Manager CropSequenceEnforcer
```csharp
using System;
using Models.Core;

namespace Models
{
    [Serializable]
    public class CropSequenceEnforcer : Model
    {
        // Crop history
        private string previousCrop1 = null;   // Most recent harvested crop
        private string previousCrop2 = null;   // Second most recent harvested crop

        // Check if the proposed crop is allowed under given cropping sequence rules
        public bool AllowsSowing(string crop)
        {
            crop = crop.ToLower();

            bool isCereal  = crop == "sorghum" || crop == "wheat";
            bool isLegume  = crop == "mungbean" || crop == "chickpea";

            if (!isCereal && !isLegume)
                throw new Exception($"CropSequenceEnforcer: Unknown crop '{crop}'.");

            // No history yet → allow only cereals
            if (previousCrop1 == null || previousCrop2 == null)
                return isCereal;

            bool previous_1_wasCereal =
                previousCrop1 == "sorghum" || previousCrop1 == "wheat";

            bool previous_2_wasCereal =
                previousCrop2 == "sorghum" || previousCrop2 == "wheat";

            // Two cereals in a row → enforce a legume
            if (previous_1_wasCereal && previous_2_wasCereal)
                return isLegume;

            // Otherwise → enforce a cereal
            return isCereal;
        }

        // Called at harvest time to update crop sequence history
        public void RecordHarvest(string crop)
        {
            crop = crop.ToLower();

            bool isRotationCrop =
                crop == "sorghum" ||
                crop == "wheat"   ||
                crop == "mungbean"||
                crop == "chickpea";

            if (isRotationCrop)
            {
                previousCrop2 = previousCrop1;
                previousCrop1 = crop;
            }
        }

        // Public read-only accessors
        public string PreviousCrop1 => previousCrop1;
        public string PreviousCrop2 => previousCrop2;
    }
}
```
      Manager SowHarvest_sorghum
        Crop = [Sorghum]
        StartDate = 1-nov
        EndDate = 10-jan
        MinESW = 50
        MinRain = 20
        RainDays = 7
        MustSow = False
        CultivarName = Buster
        SowingDepth = 30
        RowSpacing = 750
        Population = 10
        RowConfiguration = Solid
        TilleringMethod = FixedTillering
        Ftn = 0
```csharp
using APSIM.Core;
using Models.Interfaces;
using APSIM.Shared.Utilities;
using Models.Utilities;
using Models.Soils;
using Models.PMF;
using Models.PMF.Organs;
using Models.Core;
using System;
using System.Linq;
using Models.Climate;
using APSIM.Numerics;

namespace Models
{
    [Serializable]
    public class Script : Model, IStructureDependency
    {
        [Link] private Clock Clock;
        [Link] private Summary Summary;
        [Link] private Soil Soil;
        [Link] private ISoilWater waterBalance;
        [Link] private CropSequenceEnforcer cropSequenceEnforcer;
        
        public IStructure Structure { private get; set; }

        [Separator("Script Configuration")]
        [Description("Crop to manage")]
        public IPlant Crop { get; set; }

        [Separator("Sowing Conditions")]
        [Description("Start of sowing window (d-mmm)")]
        public string StartDate { get; set; }
        [Description("End of sowing window (d-mmm)")]
        public string EndDate { get; set; }
        [Description("Minimum extractable soil water for sowing (mm)")]
        public double MinESW { get; set; }
        [Description("Accumulated rainfall required for sowing (mm)")]
        public double MinRain { get; set; }
        [Description("Duration of rainfall accumulation (d)")]
        public int RainDays { get; set; }
        [Tooltip("If enabled, and if sowing conditions are not met, the crop will be sown on the final day of the sowing window.")]
        [Description("Must sow (yes/no)")]
        public bool MustSow { get; set; }

        [Separator("Sowing Properties")]
        [Description("Cultivar to be sown")]
        [Display(Type = DisplayType.CultivarName)]
        public string CultivarName { get; set; }
        [Description("Sowing depth (mm)")]
        public double SowingDepth { get; set; }
        [Description("Row spacing (mm)")]
        public double RowSpacing { get; set; }
        [Description("Plant population (/m2)")]
        public double Population { get; set; }

        [Description("Enter skip row configuration : ")]
        public RowConfigurationType RowConfiguration { get; set; }
        [Description("Tillering Method")]
        public TilleringMethodType TilleringMethod { get; set; } = 0;
        [Description("Enter Fertile Tiller No. : ")]
        public double Ftn { get; set; }
        public enum TilleringMethodType { RuleOfThumb = -1, FixedTillering = 0, DynamicTillering = 1 }
        public enum RowConfigurationType { Solid, SingleSkip, DoubleSkip }

        public Accumulator accumulatedRain { get; private set; }
        private bool afterInit = false;

        private string GetCropName()
        {
            return (Crop as Model).Name.ToLower();            
        }


        [EventSubscribe("StartOfSimulation")]
        private void OnSimulationCommencing(object sender, EventArgs e)
        {
            if (Crop == null)
                throw new Exception("Crop must not be null in rotations");
            accumulatedRain = new Accumulator(this, "[Weather].Rain", RainDays);
            Summary.WriteMessage(this, this.FullPath + " - Commence, crop=" + GetCropName(), MessageType.Diagnostic);
            afterInit = true;
            MonthlyHarvestedWt = 0;
        }

        [EventSubscribe("DoManagement")]
        private void DoManagement(object sender, EventArgs e)
        {
            accumulatedRain.Update();
        }



        // Test whether we can sow a crop today
        // +ve number - yes
        // 0          - no
        // -ve number - no, out of scope (planting window)
        [Units("0-1")]
        public int CanSow
        {
            get
            {
                if (!afterInit)
                    return 0;

                bool isPossibleToday = false;
                bool inWindow = DateUtilities.WithinDates(StartDate, Clock.Today, EndDate);
                bool endOfWindow = DateUtilities.DatesEqual(EndDate, Clock.Today);

                if (!Crop.IsAlive && inWindow &&
                    accumulatedRain.Sum > MinRain &&
                    MathUtilities.Sum(waterBalance.ESW) > MinESW)
                    isPossibleToday = true;

                string cropName = GetCropName();

                // Case 1: normal sowing
                if (isPossibleToday && cropSequenceEnforcer.AllowsSowing(cropName))
                {
                    Summary.WriteMessage(this,
                        $"Field history → PreviousCrop1={cropSequenceEnforcer.PreviousCrop1 ?? "null"}, PreviousCrop2={cropSequenceEnforcer.PreviousCrop2 ?? "null"}",
                        MessageType.Diagnostic);

                    return 1;
                }

                // Case 2: Must sow on last day of window
                if (!Crop.IsAlive && endOfWindow && MustSow &&
                    cropSequenceEnforcer.AllowsSowing(cropName))
                {
                    Summary.WriteMessage(this,
                        $"Field history (end window) → PreviousCrop1={cropSequenceEnforcer.PreviousCrop1 ?? "null"}, PreviousCrop2={cropSequenceEnforcer.PreviousCrop2 ?? "null"}",
                        MessageType.Diagnostic);

                    return 1;
                }

                // Out of window
                if (!Crop.IsAlive && !inWindow)
                    return -1;

                return 0;
            }
        }


        public void SowCrop()
        {
            Summary.WriteMessage(this, this.FullPath + " - sowing " + GetCropName(), MessageType.Diagnostic);
            Crop.Sow(
                population: Population, 
                cultivar: CultivarName, 
                depth: SowingDepth, 
                rowSpacing: RowSpacing, 
                rowConfig: (double)RowConfiguration, 
                tillering:(int)TilleringMethod, 
                ftn:Ftn
                );
        }

        [Units("0-1")]
        public int CanHarvest
        {
            get
            {
                if (!afterInit)
                    return 0;
                return Crop.IsReadyForHarvesting ? 1 : 0;
            }
        }

        public void HarvestCrop()
        {
            Summary.WriteMessage(this,
                this.FullPath + " - harvesting " + (Crop as Model).Name,
                MessageType.Diagnostic);

            MonthlyHarvestedWt = 
                (Structure.FindChild<IModel>("Grain", relativeTo: (INodeModel)Crop) 
                as ReproductiveOrgan).Wt;

            Crop.Harvest();
            Crop.EndCrop();

            string harvested = GetCropName();

            cropSequenceEnforcer.RecordHarvest(harvested);

            Summary.WriteMessage(this,
                $"Updated field history → PreviousCrop1={cropSequenceEnforcer.PreviousCrop1 ?? "null"}, PreviousCrop2={cropSequenceEnforcer.PreviousCrop2 ?? "null"}",
                MessageType.Diagnostic);
        }

        [Units("0-1")] 
        public int MustAbandon
        {
            get
            {
                // check if crop is dead
                if (afterInit && !Crop.IsAlive)
                {
                    Summary.WriteMessage(this,
                        $"Abandoning crop: Crop is dead after initialization.",
                        MessageType.Diagnostic);
                    return 1;
                }

                // check if crop did not emerge
                else if (((Crop as Plant).DaysAfterSowing > 50) && (!(Crop as Plant).IsEmerged))
                {
                    Summary.WriteMessage(this,
                        $"Abandoning crop: Crop did not emerge within 50 days after sowing.",
                        MessageType.Diagnostic);
                    return 1;
                }

                // check if crop is late for harvest
                else if (Crop.IsAlive && (Crop as Plant).DaysAfterSowing > 180)
                {
                    Summary.WriteMessage(this,
                        $"Abandoning crop: Crop is late for harvest (180 days after sowing).",
                        MessageType.Diagnostic);
                    return 1;
                }

                // crop is neither dead nor late for harvest
                return 0;
            }
        }

        // Abandon crop
        public void AbandonCrop()
        {
            if (Crop.IsAlive)
            {
                Crop.EndCrop();
            }
        }

        public double MonthlyHarvestedWt { get; set; }

        [EventSubscribe("StartOfMonth")]
        private void DoStartOfMonth(object sender, EventArgs e)
        {
            MonthlyHarvestedWt = 0;
        }
    }
}
```
      Manager SowHarvest_wheat
        Crop = [Wheat]
        StartDate = 25-apr
        EndDate = 15-jun
        MinESW = 80
        MinRain = 30
        RainDays = 7
        MustSow = False
        CultivarName = Janz
        SowingDepth = 40
        RowSpacing = 500
        Population = 25
```csharp
using APSIM.Core;
using Models.Interfaces;
using APSIM.Shared.Utilities;
using Models.Utilities;
using Models.Soils;
using Models.PMF;
using Models.PMF.Organs;
using Models.Core;
using System;
using System.Linq;
using Models.Climate;
using APSIM.Numerics;

namespace Models
{
    [Serializable]
    public class Script : Model, IStructureDependency
    {
        [Link] private Clock Clock;
        [Link] private Summary Summary;
        [Link] private Soil Soil;
        [Link] private ISoilWater waterBalance;
        [Link] private CropSequenceEnforcer cropSequenceEnforcer;

        public IStructure Structure { private get; set; }

        [Separator("Script Configuration")]
        [Description("Crop to manage")]
        public IPlant Crop { get; set; }

        [Separator("Sowing Conditions")]
        [Description("Start of sowing window (d-mmm)")]
        public string StartDate { get; set; }
        [Description("End of sowing window (d-mmm)")]
        public string EndDate { get; set; }
        [Description("Minimum extractable soil water for sowing (mm)")]
        public double MinESW { get; set; }
        [Description("Accumulated rainfall required for sowing (mm)")]
        public double MinRain { get; set; }
        [Description("Duration of rainfall accumulation (d)")]
        public int RainDays { get; set; }
        [Tooltip("If enabled, and if sowing conditions are not met, the crop will be sown on the final day of the sowing window.")]
        [Description("Must sow (yes/no)")]
        public bool MustSow { get; set; }

        [Separator("Sowing Properties")]
        [Description("Cultivar to be sown")]
        [Display(Type = DisplayType.CultivarName)]
        public string CultivarName { get; set; }
        [Description("Sowing depth (mm)")]
        public double SowingDepth { get; set; }
        [Description("Row spacing (mm)")]
        public double RowSpacing { get; set; }
        [Description("Plant population (/m2)")]
        public double Population { get; set; }

        public Accumulator accumulatedRain { get; private set; }
        private bool afterInit = false;

        private string GetCropName()
        {
            return (Crop as Model).Name.ToLower();            
        }

        [EventSubscribe("StartOfSimulation")]
        private void OnSimulationCommencing(object sender, EventArgs e)
        {
            if (Crop == null)
                throw new Exception("Crop must not be null in rotations");
            accumulatedRain = new Accumulator(this, "[Weather].Rain", RainDays);
            Summary.WriteMessage(this, this.FullPath + " - Commence, crop=" + (Crop as Model).Name, MessageType.Diagnostic);
            afterInit = true;
            MonthlyHarvestedWt = 0;
        }
        
        [EventSubscribe("DoManagement")]
        private void DoManagement(object sender, EventArgs e)
        {
            accumulatedRain.Update();
        }

        // Test whether we can sow a crop today
        // +ve number - yes
        // 0          - no
        // -ve number - no, out of scope (planting window)
        [Units("0-1")]
        public int CanSow
        {
            get
            {
                if (!afterInit)
                    return 0;

                bool isPossibleToday = false;
                bool inWindow = DateUtilities.WithinDates(StartDate, Clock.Today, EndDate);
                bool endOfWindow = DateUtilities.DatesEqual(EndDate, Clock.Today);

                if (!Crop.IsAlive && inWindow &&
                    accumulatedRain.Sum > MinRain &&
                    MathUtilities.Sum(waterBalance.ESW) > MinESW)
                    isPossibleToday = true;

                string cropName = GetCropName();

                // Case 1: normal sowing
                if (isPossibleToday && cropSequenceEnforcer.AllowsSowing(cropName))
                {
                    Summary.WriteMessage(this,
                        $"Field history → PreviousCrop1={cropSequenceEnforcer.PreviousCrop1 ?? "null"}, PreviousCrop2={cropSequenceEnforcer.PreviousCrop2 ?? "null"}",
                        MessageType.Diagnostic);

                    return 1;
                }

                // Case 2: Must sow on last day of window
                if (!Crop.IsAlive && endOfWindow && MustSow &&
                    cropSequenceEnforcer.AllowsSowing(cropName))
                {
                    Summary.WriteMessage(this,
                        $"Field history (end window) → PreviousCrop1={cropSequenceEnforcer.PreviousCrop1 ?? "null"}, PreviousCrop2={cropSequenceEnforcer.PreviousCrop2 ?? "null"}",
                        MessageType.Diagnostic);

                    return 1;
                }

                // Out of window
                if (!Crop.IsAlive && !inWindow)
                    return -1;

                return 0;
            }
        }


        public void SowCrop()
        {
            Summary.WriteMessage(this, this.FullPath + " - sowing " + GetCropName(), MessageType.Diagnostic);
            Crop.Sow(population: Population, cultivar: CultivarName, depth: SowingDepth, rowSpacing: RowSpacing);
        }

        [Units("0-1")] 
        public int CanHarvest
        {
            get
            {
                if (!afterInit)
                    return (0);
                //Summary.WriteMessage(this, "canLeave:" + Crop.IsReadyForHarvesting, MessageType.Diagnostic);
                return Crop.IsReadyForHarvesting ? 1 : 0;
            }
        }


        public void HarvestCrop()
        {
            Summary.WriteMessage(this,
                this.FullPath + " - harvesting " + (Crop as Model).Name,
                MessageType.Diagnostic);

            MonthlyHarvestedWt = 
                (Structure.FindChild<IModel>("Grain", relativeTo: (INodeModel)Crop) 
                as ReproductiveOrgan).Wt;

            Crop.Harvest();
            Crop.EndCrop();

            string harvested = GetCropName();

            cropSequenceEnforcer.RecordHarvest(harvested);

            Summary.WriteMessage(this,
                $"Updated field history → PreviousCrop1={cropSequenceEnforcer.PreviousCrop1 ?? "null"}, PreviousCrop2={cropSequenceEnforcer.PreviousCrop2 ?? "null"}",
                MessageType.Diagnostic);
        }


        [Units("0-1")] 
        public int MustAbandon
        {
            get
            {
                // check if crop is dead
                if (afterInit && !Crop.IsAlive)
                {
                    Summary.WriteMessage(this,
                        $"Abandoning crop: Crop is dead after initialization.",
                        MessageType.Diagnostic);
                    return 1;
                }

                // check if crop did not emerge
                else if (((Crop as Plant).DaysAfterSowing > 50) && (!(Crop as Plant).IsEmerged))
                {
                    Summary.WriteMessage(this,
                        $"Abandoning crop: Crop did not emerge within 50 days after sowing.",
                        MessageType.Diagnostic);
                    return 1;
                }

                // check if crop is late for harvest
                else if (Crop.IsAlive && (Crop as Plant).DaysAfterSowing > 180)
                {
                    Summary.WriteMessage(this,
                        $"Abandoning crop: Crop is late for harvest (180 days after sowing).",
                        MessageType.Diagnostic);
                    return 1;
                }

                // crop is neither dead nor late for harvest
                return 0;
            }
        }

        // Abandon crop
        public void AbandonCrop()
        {
            if (Crop.IsAlive)
            {
                Crop.EndCrop();
            }
        }

        public double MonthlyHarvestedWt { get; set; }

        [EventSubscribe("StartOfMonth")]
        private void DoStartOfMonth(object sender, EventArgs e)
        {
            MonthlyHarvestedWt = 0;
        }
    }
}
```
      Manager SowHarvest_mungbean
        Crop = [Mungbean]
        StartDate = 1-oct
        EndDate = 30-dec
        MinESW = 50
        MinRain = 20
        RainDays = 7
        MustSow = False
        CultivarName = CeleraII
        SowingDepth = 40
        RowSpacing = 500
        Population = 25
        script: same as in CropRotation_flexible_final.Paddock.SowHarvest_wheat
      Manager SowHarvest_chickpea
        Crop = [Chickpea]
        StartDate = 15-may
        EndDate = 15-jun
        MinESW = 80
        MinRain = 30
        RainDays = 7
        MustSow = False
        CultivarName = Amethyst
        SowingDepth = 40
        RowSpacing = 500
        Population = 25
        script: same as in CropRotation_flexible_final.Paddock.SowHarvest_wheat
      Manager Fert_sorghum
        Crop = [Sorghum]
        FertiliserType = UreaN
        Amount = 100
```csharp
using Models.Soils;
using System;
using System.Linq;
using Models.Core;
using Models.PMF;
namespace Models
{
    [Serializable]
    public class Script : Model
    {
        [Link] Clock Clock;
        [Link] Fertiliser Fertiliser;
        
        [Description("Crop to be fertilised")]
        public IPlant Crop { get; set; }

        [Description("Type of fertiliser to apply? ")] 
        [Display(Type = DisplayType.FertiliserType)]public string FertiliserType { get; set; }
    
        [Description("Amount of fertiliser to be applied (kg/ha)")]
        public double Amount { get; set; }
        
        [EventSubscribe("Sowing")]
        private void OnSowing(object sender, EventArgs e)
        {
            Model crop = sender as Model;
            if (Crop != null && crop.Name.ToLower() == (Crop as IModel).Name.ToLower())
                Fertiliser.Apply(amount: Amount, type: FertiliserType);
        }
    }
}
```
      Manager Fert_wheat
        Crop = [Wheat]
        FertiliserType = UreaN
        Amount = 100
        script: same as in CropRotation_flexible_final.Paddock.Fert_sorghum
      Manager Fert_mungbean
        Crop = [Mungbean]
        FertiliserType = UreaN
        Amount = 15
        script: same as in CropRotation_flexible_final.Paddock.Fert_sorghum
      Manager Fert_chickpea
        Crop = [Sorghum]
        FertiliserType = UreaN
        Amount = 15
        script: same as in CropRotation_flexible_final.Paddock.Fert_sorghum
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