Simulations: Version=204
  DataStore
  Simulation ContinuousSorghum_CarryOver
    Clock: Start=1985-01-01; End=1999-12-31
    Summary
    Weather: FileName=%root%/Examples/WeatherFiles/AU_Dalby.met
    SoilArbitrator
    Zone Paddock: Area=1; Slope=0; AspectAngle=0; Altitude=50
      Report DailyReport: EventNames=[Clock].EndOfDay
        VariableNames:
          [Clock].Today
          [SurfaceOrganicMatter].Cover
          [SurfaceOrganicMatter].Wt
          [ISoilWater].Runoff
          Sum([Soil].Nutrient.Organic.C) as SoilOrganicC_fullProfile
          Sum([Soil].Nutrient.Organic.N) as SoilOrganicN_fullProfile
          Sum([Soil].Nutrient.MineralisedN) as MineralisedN_fullProfile
          Sum([Soil].Water.Volumetric) as SoilWatVolumetric_fullProfile
          Sum([Nutrient].MineralisedN) as MineralisedN_fullProfile
          Sum([Nitrification].Value + [Nitrification].Natm) as Nitrification_total
          Sum([Denitrification].Value + [Denitrification].Natm) as Denitrification_total
      Report HarvestReport: EventNames=[Sorghum].Harvesting
        VariableNames:
          [Clock].Today
          [Sorghum].Grain.Wt
          [Sorghum].AboveGround.Wt
          [Sorghum].Leaf.LAI
      Folder Manager folder
        Manager Harvesting rule
```csharp
using Models.Soils;
using System;
using System.Linq;
using Models.Core;
using Models.PMF;

namespace Models
{
    [Serializable]

    public class Script : Model
    {
        [Link]
        private Clock clock;

        [Link]
        private IPlant crop;

        [EventSubscribe("EndOfDay")]
        private void OnDoCalculations(object sender, EventArgs e)
        {
            if (crop.IsReadyForHarvesting)
            {
                crop.Harvest();
                crop.EndCrop();
            }
        }
    }
}
```
        Manager SowingRule
          Crop = [Sorghum]
          StartDate = 1-nov
          EndDate = 10-jan
          MinESW = 120
          MinRain = 50
          RainDays = 7
          CultivarName = Buster
          SowingDepth = 30
          RowSpacing = 750
          Density = 10
          RowConfiguration = Solid
          TilleringMethod = FixedTillering
          Ftn = 0
```csharp
using APSIM.Numerics;
using Models.Climate;
using System.Linq;
using System;
using Models.Core;
using Models.PMF;
using Models.Soils;
using Models.Utilities;
using APSIM.Shared.Utilities;
using Models.Interfaces;

namespace Models
{
    [Serializable]
    public class Script : Model
    {
        [Link] private Clock Clock;
        [Link] private Fertiliser Fertiliser;
        [Link] private Summary Summary;
        [Link] private Soil Soil;
        [Link] private Zone paddock;
        private Accumulator accumulatedRain;
        [Link]
        private ISoilWater waterBalance;
        
        [Description("Crop")]
        public Plant Crop { get; set; }

        [Description("Start of sowing window (d-mmm)")]
        public string StartDate { get; set; }

        [Description("End of sowing window (d-mmm)")]
        public string EndDate { get; set; }

        [Description("Minimum extractable soil water for sowing (mm)")]
        public double MinESW { get; set; }

        [Description("Accumulated rainfall required for sowing (mm)")]
        public double MinRain { get; set; }

        [Description("Duration of rainfall accumulation (d)")]
        public int RainDays { get; set; }

        [Display(Type = DisplayType.CultivarName)]
        [Description("Cultivar to be sown")]
        public string CultivarName { get; set; }

        [Description("Sowing depth (mm)")]
        public double SowingDepth { get; set; }

        [Description("Row spacing (mm)")]
        public double RowSpacing { get; set; }

        [Description("Sowing Density (/m2)")]
        public double Density { get; set; }
        
        [Description("Enter skip row configuration : ")]
        public RowConfigurationType RowConfiguration { get; set; }

        [Description("Tillering Method")]
        public TilleringMethodType TilleringMethod { get; set; } = 0;

        [Description("Enter Fertile Tiller No. : ")]
        public double Ftn { get; set; }

        public enum TilleringMethodType 
        {
            RuleOfThumb = -1,
            FixedTillering = 0,
            DynamicTillering = 1
        }
        public enum RowConfigurationType 
        {
            Solid, SingleSkip, DoubleSkip
        }
        
        [EventSubscribe("StartOfSimulation")]
        private void OnSimulationCommencing(object sender, EventArgs e)
        {
            accumulatedRain = new Accumulator(this, "[Weather].Rain", RainDays);
        }

        [EventSubscribe("DoManagement")]
        private void OnDoManagement(object sender, EventArgs e)
        {
            accumulatedRain.Update();
            
            if (DateUtilities.WithinDates(StartDate, Clock.Today, EndDate) &&
                !Crop.IsAlive &&
                MathUtilities.Sum(waterBalance.ESW) > MinESW &&
                accumulatedRain.Sum > MinRain)
            {
                double population = Density * paddock.Area;
                Crop.Sow(cultivar:CultivarName, population:population, depth:SowingDepth, rowSpacing:RowSpacing, rowConfig: (double)RowConfiguration, tillering:(int)TilleringMethod, ftn:Ftn);
            }
        }
    }
}
```
      Fertiliser
      MicroClimate: a_interception=0; b_interception=1; c_interception=0; d_interception=0; SoilHeatFluxFraction=0.4; MinimumHeightDiffForNewLayer=0; NightInterceptionFraction=0.5; ReferenceHeight=2
      Soil HRS: SoilType=HMM; Site=HRS; NearestTown=Unknown; Region=SE Queensland; NaturalVegetation=Unknown; Latitude=-27.18; Longitude=151.26
        Physical
          Thickness  ParticleSizeSand  ParticleSizeSilt  ParticleSizeClay  Rocks  BD    AirDry  LL15   DUL   SAT
          100        5                 65                30                0      1.34  0.08    0.226  0.42  0.45
          100        5                 65                30                0      1.34  0.19    0.226  0.42  0.45
          200        5                 65                30                0      1.33  0.23    0.258  0.46  0.48
          200        5                 65                30                0      1.38  0.26    0.27   0.46  0.47
          200        5                 65                30                0      1.4   0.26    0.268  0.43  0.45
          200        5                 65                30                0      1.55  0.28    0.304  0.4   0.41
          200        5                 65                30                0      1.59  0.25    0.335  0.37  0.38
          200        5                 65                30                0      1.63  0.28    0.33   0.33  0.37
          200        5                 65                30                0      1.66  0.3     0.32   0.32  0.37
          200        5                 65                30                0      1.68  0.31    0.33   0.33  0.36
          Rocks, ParticleSizeSand, ParticleSizeSilt, ParticleSizeClay source: Calculated
          SoilCrop SorghumSoil
            LL=[0.226, 0.226, 0.258, 0.27, 0.268, 0.304, 0.335, 0.33, 0.32, 0.33]
            KL=[0.07, 0.07, 0.07, 0.07, 0.06, 0.06, 0.06, 0.05, 0.05, 0.04]
            XF=[1, 1, 1, 1, 1, 1, 1, 1, 1, 1]
        WaterBalance SoilWater: SummerDate=1-Nov; SummerU=1.5; SummerCona=6.5; WinterDate=1-Apr; WinterU=1.5; WinterCona=6.5; DiffusConst=40; DiffusSlope=16; Salb=0.2; CN2Bare=85; CNRed=20; CNCov=0.8; PSIDul=-100; Thickness=[100, 100, 200, 200, 200, 200, 200, 200, 200, 200]; SWCON=[0.3, 0.3, 0.3, 0.3, 0.3, 0.3, 0.3, 0.3, 0.3, 0.3]
        Nutrient
        Organic: FOMCNRatio=50; CarbonUnits=Total
          Thickness  Carbon  SoilCNRatio  FBiom  FInert  FOM
          100        1.19    12.5         0.05   0.45    260.587
          100        0.59    12.5         0.02   0.6     220.582
          200        0.45    12.5         0.01   0.75    158.054
          200        0.3     12.5         0.01   0.9     113.251
          200        0.2     12.5         0.01   0.9     81.1478
          200        0.16    12.5         0.01   0.9     58.1449
          200        0.17    12.5         0.01   0.9     41.6626
          200        0.17    12.5         0.05   0.9     29.8526
          200        0.17    12.5         0.02   0.9     21.3903
          200        0.17    12.5         0.01   0.9     15.3268
        Chemical: PHUnits=Water
          Thickness  PH   CEC
          100        6.3  11.0225
          100        6.4  9.6725
          200        6.5  9.3575
          200        6.6  9.02
          200        6.6  8.795
          200        6.5  8.705
          200        6.5  8.7275
          200        6.5  8.7275
          200        6.5  8.7275
          200        6.5  8.7275
          CEC source: Calculated
        Water: Thickness=[100, 100, 200, 200, 200, 200, 200, 200, 200, 200]; FilledFromTop=false
          InitialValues=[0.323, 0.323, 0.359, 0.365, 0.349, 0.352, 0.3525, 0.33, 0.32, 0.33]
        Solute NO3: Thickness=[100, 100, 200, 200, 200, 200, 200, 200, 200, 200]; InitialValuesUnits=ppm; WaterTableConcentration=0; D0=0; DepthConstant=0; MaxDepthSoluteAccessible=0; RunoffEffectivenessAtMovingSolute=0; MaxEffectiveRunoff=0
          InitialValues=[10.4, 1.633, 1.233, 0.9, 1.1, 1.467, 3.633, 5.667, 5.8, 7.267]
        Solute NH4: Thickness=[100, 100, 200, 200, 200, 200, 200, 200, 200, 200]; InitialValues=[0.1, 0.1, 0.1, 0.1, 0.1, 0.1, 0.1, 0.1, 0.1, 0.1]; InitialValuesUnits=ppm; WaterTableConcentration=0; D0=0; DepthConstant=0; MaxDepthSoluteAccessible=0; RunoffEffectivenessAtMovingSolute=0; MaxEffectiveRunoff=0
        Solute Urea: Thickness=[100, 100, 200, 200, 200, 200, 200, 200, 200, 200]; InitialValues=[0, 0, 0, 0, 0, 0, 0, 0, 0, 0]; InitialValuesUnits=kg/ha; WaterTableConcentration=0; D0=0; DepthConstant=0; MaxDepthSoluteAccessible=0; RunoffEffectivenessAtMovingSolute=0; MaxEffectiveRunoff=0
        SoilTemperature Temperature
      Plant Sorghum
      SurfaceOrganicMatter: InitialResidueName=wheat_stubble; InitialResidueType=wheat; InitialResidueMass=0; InitialStandingFraction=0; InitialCPR=0; InitialCNR=80
      Manager Fertilise at sowing
        Crop = [Sorghum]
        FertiliserType = UreaN
        Amount = 100
```csharp
using Models.Soils;
using System;
using System.Linq;
using Models.Core;
using Models.PMF;
namespace Models
{
    [Serializable]
    public class Script : Model
    {
        [Link] Clock Clock;
        [Link] Fertiliser Fertiliser;
        
        [Description("Crop to be fertilised")]
        public IPlant Crop { get; set; }

        [Description("Type of fertiliser to apply? ")] 
        [Display(Type = DisplayType.FertiliserType)]public string FertiliserType { get; set; }
    
        [Description("Amount of fertiliser to be applied (kg/ha)")]
        public double Amount { get; set; }
        
        [EventSubscribe("Sowing")]
        private void OnSowing(object sender, EventArgs e)
        {
            Model crop = sender as Model;
            if (Crop != null && crop.Name.ToLower() == (Crop as IModel).Name.ToLower())
                Fertiliser.Apply(amount: Amount, type: FertiliserType);
        }
    }
}
```
  Simulation ContinuousSorghum_Reset
    Clock: Start=1985-01-01; End=1999-12-31
    Summary
    Weather: FileName=%root%/Examples/WeatherFiles/AU_Dalby.met
    SoilArbitrator
    Zone Paddock: Area=1; Slope=0; AspectAngle=0; Altitude=50
      Report DailyReport: same as ContinuousSorghum_CarryOver.Paddock.DailyReport
      Report HarvestReport: EventNames=[Sorghum].Harvesting
        VariableNames:
          [Clock].Today
          [Sorghum].Grain.Wt
          [Sorghum].AboveGround.Wt
          [Sorghum].Leaf.LAI
      Folder Manager folder: same as ContinuousSorghum_CarryOver.Paddock.Manager folder
      Fertiliser
      MicroClimate: a_interception=0; b_interception=1; c_interception=0; d_interception=0; SoilHeatFluxFraction=0.4; MinimumHeightDiffForNewLayer=0; NightInterceptionFraction=0.5; ReferenceHeight=2
      Soil HRS: same as ContinuousSorghum_CarryOver.Paddock.HRS
      Plant Sorghum
      SurfaceOrganicMatter: InitialResidueName=wheat_stubble; InitialResidueType=wheat; InitialResidueMass=0; InitialStandingFraction=0; InitialCPR=0; InitialCNR=80
      Manager Fertilise at sowing: same as ContinuousSorghum_CarryOver.Paddock.Fertilise at sowing
      Manager Reset on date
        ResetDate = 1-May
        OffsetDays = 0
        ResetWater = True
        ResetNutrients = True
        ResetSOM = True
```csharp
using Models.Soils.Nutrients;
using APSIM.Shared.Utilities;
using Models.Surface;
using Models.Utilities;
using Models.Soils.Nutrients;
using Models.Soils;
using Models.PMF;
using Models.Core;
using System;
using System.Linq;
using Models.Interfaces;

namespace Models
{
    [Serializable]
    public class Script : Model
    {
        [Link] private Clock Clock;
        [Link] private Plant Wheat;
        [Link] private ISoilWater SoilWater;
        [Link] private Nutrient nutrient;
        [Link] private SurfaceOrganicMatter SOM;
        [Link] private Summary Summary;

        [Description("Date to reset on:")]
        public string ResetDate {get;set;}
        
        [Description("Offset by Days (Negative is Days Before, Positive is Days After):")]
        public int OffsetDays {get;set;}

        [Description("Reset Water?")]
        public bool ResetWater {get;set;}

        [Description("Reset Soil Nutrients?")]
        public bool ResetNutrients {get;set;}

        [Description("Reset Surface Organic Matter?")]
        public bool ResetSOM {get;set;}

        [EventSubscribe("DoManagement")]
        private void OnDoManagement(object sender, EventArgs e)
        {
            DateTime offsetDate = DateUtilities.GetDate(ResetDate, Clock.Today).AddDays(OffsetDays);
            if (offsetDate.Equals(Clock.Today))
            {
                if (ResetWater)
                {
                    Summary.WriteMessage(this, "Reset Water", MessageType.Diagnostic);
                    SoilWater.Reset();
                }
                if (ResetNutrients)
                {
                    Summary.WriteMessage(this, "Reset Nitrogen", MessageType.Diagnostic);
                    nutrient.Reset();
                }
                if (ResetSOM)
                {
                    Summary.WriteMessage(this, "Reset Surface OM", MessageType.Diagnostic);
                    SOM.Reset();
                }
            }
        }
    }
}
```
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